# OpenSim document version 40000
InverseKinematicsTool:
  model_file: RBDS014_scaledModelAdjusted.osim
  time_range: 0 29.99333
  marker_file: RBDS014runT45_filtered.trc
  output_motion_file: RBDS014runT45_ik.mot
  IKTaskSet ikTasks_Fukuchi2017:
    IKMarkerTask R.ASIS: apply=true weight=10
    IKMarkerTask L.ASIS: apply=true weight=10
    IKMarkerTask R.PSIS: apply=true weight=10
    IKMarkerTask L.PSIS: apply=true weight=10
    IKMarkerTask R.Iliac.Crest: apply=true weight=2.5
    IKMarkerTask L.Iliac.Crest: apply=true weight=2.5
    IKMarkerTask R.GTR: apply=false weight=0
    IKMarkerTask L.GTR: apply=false weight=0
    IKMarkerTask R.Thigh.Top.Lateral: apply=true weight=5
    IKMarkerTask R.Thigh.Bottom.Lateral: apply=true weight=5
    IKMarkerTask R.Thigh.Top.Medial: apply=true weight=5
    IKMarkerTask R.Thigh.Bottom.Medial: apply=true weight=5
    IKMarkerTask L.Thigh.Top.Lateral: apply=true weight=5
    IKMarkerTask L.Thigh.Bottom.Lateral: apply=true weight=5
    IKMarkerTask L.Thigh.Top.Medial: apply=true weight=5
    IKMarkerTask L.Thigh.Bottom.Medial: apply=true weight=5
    IKMarkerTask R.Knee: apply=false weight=0
    IKMarkerTask R.Knee.Medial: apply=false weight=0
    IKMarkerTask L.Knee: apply=false weight=0
    IKMarkerTask L.Knee.Medial: apply=false weight=0
    IKMarkerTask R.HF: apply=false weight=0
    IKMarkerTask R.TT: apply=false weight=0
    IKMarkerTask L.HF: apply=false weight=0
    IKMarkerTask L.TT: apply=false weight=0
    IKMarkerTask R.Shank.Top.Lateral: apply=true weight=5
    IKMarkerTask R.Shank.Bottom.Lateral: apply=true weight=5
    IKMarkerTask R.Shank.Top.Medial: apply=true weight=5
    IKMarkerTask R.Shank.Bottom.Medial: apply=true weight=5
    IKMarkerTask L.Shank.Top.Lateral: apply=true weight=5
    IKMarkerTask L.Shank.Bottom.Lateral: apply=true weight=5
    IKMarkerTask L.Shank.Top.Medial: apply=true weight=5
    IKMarkerTask L.Shank.Bottom.Medial: apply=true weight=5
    IKMarkerTask R.Ankle: apply=false weight=0
    IKMarkerTask R.Ankle.Medial: apply=false weight=0
    IKMarkerTask L.Ankle: apply=false weight=0
    IKMarkerTask L.Ankle.Medial: apply=false weight=0
    IKMarkerTask R.Heel.Top: apply=true weight=10
    IKMarkerTask R.Heel.Bottom: apply=true weight=10
    IKMarkerTask R.Heel.Lateral: apply=true weight=10
    IKMarkerTask L.Heel.Top: apply=true weight=10
    IKMarkerTask L.Heel.Bottom: apply=true weight=10
    IKMarkerTask L.Heel.Lateral: apply=true weight=10
    IKMarkerTask R.MT1: apply=true weight=5
    IKMarkerTask R.MT2: apply=false weight=0
    IKMarkerTask R.MT5: apply=true weight=5
    IKMarkerTask L.MT1: apply=true weight=5
    IKMarkerTask L.MT2: apply=false weight=0
    IKMarkerTask L.MT5: apply=true weight=5
