# OpenSim document version 20302
MeasurementSet:
  Measurement pelvis_w: apply=true
    MarkerPair: markers=(R.ASIS L.ASIS)
    MarkerPair: markers=(R.PSIS L.PSIS)
    BodyScale pelvis: axes=Z
  Measurement pelvis_d: apply=true
    MarkerPair: markers=(R.ASIS R.PSIS)
    MarkerPair: markers=(L.ASIS L.PSIS)
    BodyScale pelvis: axes=X
  Measurement pelvis_h: apply=true
    MarkerPair: markers=(R.ASIS R.GTR)
    MarkerPair: markers=(L.ASIS L.GTR)
    MarkerPair: markers=(R.PSIS R.GTR)
    MarkerPair: markers=(L.PSIS L.GTR)
    MarkerPair: markers=(R.Iliac.Crest R.GTR)
    MarkerPair: markers=(L.Iliac.Crest L.GTR)
    BodyScale pelvis: axes=Y
  Measurement r_thigh_length: apply=true
    MarkerPair: markers=(R.GTR R.Knee)
    BodyScale femur_r: axes=Y
    BodyScale patella_r: axes=(X Y Z)
  Measurement r_thigh_breadth: apply=true
    MarkerPair: markers=(R.Knee R.Knee.Medial)
    BodyScale femur_r: axes=(X Z)
  Measurement r_tibia_length: apply=true
    MarkerPair: markers=(R.HF R.Ankle)
    BodyScale tibia_r: axes=Y
    BodyScale talus_r: axes=Y
  Measurement r_tibia_breadth: apply=true
    MarkerPair: markers=(R.Ankle R.Ankle.Medial)
    BodyScale tibia_r: axes=(X Z)
    BodyScale talus_r: axes=(X Z)
    BodyScale calcn_r: axes=Z
    BodyScale toes_r: axes=Z
  Measurement r_foot_length: apply=true
    MarkerPair: markers=(R.Heel.Top R.MT2)
    BodyScale calcn_r: axes=X
    BodyScale toes_r: axes=X
  Measurement r_foot_height: apply=true
    MarkerPair: markers=(R.Heel.Top R.Heel.Bottom)
    BodyScale calcn_r: axes=Y
    BodyScale toes_r: axes=Y
  Measurement l_thigh_length: apply=true
    MarkerPair: markers=(L.GTR L.Knee)
    BodyScale femur_l: axes=Y
    BodyScale patella_l: axes=(X Y Z)
  Measurement l_thigh_breadth: apply=true
    MarkerPair: markers=(L.Knee L.Knee.Medial)
    BodyScale femur_l: axes=(X Z)
  Measurement l_tibia_length: apply=true
    MarkerPair: markers=(L.HF L.Ankle)
    BodyScale tibia_l: axes=Y
    BodyScale talus_l: axes=Y
  Measurement l_tibia_breadth: apply=true
    MarkerPair: markers=(L.Ankle L.Ankle.Medial)
    BodyScale tibia_l: axes=(X Z)
    BodyScale talus_l: axes=(X Z)
    BodyScale calcn_l: axes=Z
    BodyScale toes_l: axes=Z
  Measurement l_foot_length: apply=true
    MarkerPair: markers=(L.Heel.Top L.MT2)
    BodyScale calcn_l: axes=X
    BodyScale toes_l: axes=X
  Measurement l_foot_height: apply=true
    MarkerPair: markers=(L.Heel.Top L.Heel.Bottom)
    BodyScale calcn_l: axes=Y
    BodyScale toes_l: axes=Y
